clear

Redirect subestacao.dss
Redirect linecodes.dss
Redirect lines.dss
Redirect loadshape.dss
Redirect loads.dss
Redirect capacitors.dss
Redirect transformer_sub.dss
Redirect transformer.dss
Redirect regulators.dss
Redirect switches.dss

Redirect tensao_base.dss

set mode=daily //padrão, mas pode ser daily por ex
set stepsize = 15m
set number = 96
solve

!Transformer.Reg1.Taps=[1.0 1.0625]
!Transformer.Reg2.Taps=[1.0 1.0500]
!Transformer.Reg3.Taps=[1.0 1.06875]
!Set Controlmode=OFF !N�o controla quantidade de itera��es
