! Monitores do tipo : Line
Export monitors _abcn_l01-sec_power
Export monitors _abcn_l01-sec_voltage
Export monitors _cn_l02-ramal_power
Export monitors _cn_l02-ramal_voltage
Export monitors _abcn_l03-sec_power
Export monitors _abcn_l03-sec_voltage
Export monitors _abcn_l04-sec_power
Export monitors _abcn_l04-sec_voltage
Export monitors _abcn_l05-sec_power
Export monitors _abcn_l05-sec_voltage
Export monitors _abcn_l06-sec_power
Export monitors _abcn_l06-sec_voltage
Export monitors _an_l07-ramal_power
Export monitors _an_l07-ramal_voltage
Export monitors _bcn_l08-ramal_power
Export monitors _bcn_l08-ramal_voltage
Export monitors _abcn_l09-sec_power
Export monitors _abcn_l09-sec_voltage
Export monitors _abcn_l10-sec_power
Export monitors _abcn_l10-sec_voltage
Export monitors _abcn_l11-ramal_power
Export monitors _abcn_l11-ramal_voltage
Export monitors _an_l12-ramal_power
Export monitors _an_l12-ramal_voltage
Export monitors _bcn_l13-ramal_power
Export monitors _bcn_l13-ramal_voltage
Export monitors _abcn_l14-ramal_power
Export monitors _abcn_l14-ramal_voltage
Export monitors _acn_l15-ramal_power
Export monitors _acn_l15-ramal_voltage
Export monitors _bn_l16-ramal_power
Export monitors _bn_l16-ramal_voltage
Export monitors _abcn_l17-sec_power
Export monitors _abcn_l17-sec_voltage
Export monitors _bcn_l18-ramal_power
Export monitors _bcn_l18-ramal_voltage
Export monitors _abcn_l19-sec_power
Export monitors _abcn_l19-sec_voltage
Export monitors _abcn_l20-sec_power
Export monitors _abcn_l20-sec_voltage
Export monitors _abcn_l21-sec_power
Export monitors _abcn_l21-sec_voltage
Export monitors _bcn_l22-ramal_power
Export monitors _bcn_l22-ramal_voltage
Export monitors _abcn_l23-sec_power
Export monitors _abcn_l23-sec_voltage
Export monitors _bn_l24-ramal_power
Export monitors _bn_l24-ramal_voltage
Export monitors _abn_l25-ramal_power
Export monitors _abn_l25-ramal_voltage
Export monitors _cn_l26-ramal_power
Export monitors _cn_l26-ramal_voltage
Export monitors _abcn_l27-sec_power
Export monitors _abcn_l27-sec_voltage
Export monitors _an_l28-ramal_power
Export monitors _an_l28-ramal_voltage
Export monitors _cn_l29-ramal_power
Export monitors _cn_l29-ramal_voltage
Export monitors _an_l30-ramal_power
Export monitors _an_l30-ramal_voltage
Export monitors _cn_l31-ramal_power
Export monitors _cn_l31-ramal_voltage
Export monitors _cn_l32-ramal_power
Export monitors _cn_l32-ramal_voltage
Export monitors _an_l33-ramal_power
Export monitors _an_l33-ramal_voltage
Export monitors _acn_l34-ramal_power
Export monitors _acn_l34-ramal_voltage
Export monitors _an_l35-ramal_power
Export monitors _an_l35-ramal_voltage
Export monitors _bn_l36-ramal_power
Export monitors _bn_l36-ramal_voltage
Export monitors _cn_l37-ramal_power
Export monitors _cn_l37-ramal_voltage
Export monitors _bn_l38-ramal_power
Export monitors _bn_l38-ramal_voltage
Export monitors _an_l39-ramal_power
Export monitors _an_l39-ramal_voltage

! Monitores do tipo : Load
Export monitors c01_power
Export monitors c01_voltage
Export monitors c02_power
Export monitors c02_voltage
Export monitors c03_power
Export monitors c03_voltage
Export monitors c04_power
Export monitors c04_voltage
Export monitors c05_power
Export monitors c05_voltage
Export monitors c06_power
Export monitors c06_voltage
Export monitors c07_power
Export monitors c07_voltage
Export monitors c08_power
Export monitors c08_voltage
Export monitors c09_power
Export monitors c09_voltage
Export monitors c10_power
Export monitors c10_voltage
Export monitors c11_power
Export monitors c11_voltage
Export monitors c12_power
Export monitors c12_voltage
Export monitors c13_power
Export monitors c13_voltage
Export monitors c14_power
Export monitors c14_voltage
Export monitors c15_power
Export monitors c15_voltage
Export monitors c16_power
Export monitors c16_voltage
Export monitors c17_power
Export monitors c17_voltage
Export monitors c18_power
Export monitors c18_voltage
Export monitors c19_power
Export monitors c19_voltage
Export monitors c20_power
Export monitors c20_voltage
Export monitors c21_power
Export monitors c21_voltage
Export monitors c22_power
Export monitors c22_voltage
Export monitors c23_power
Export monitors c23_voltage
Export monitors c24_power
Export monitors c24_voltage
Export monitors c25_power
Export monitors c25_voltage
Export monitors c26_power
Export monitors c26_voltage
Export monitors c27_power
Export monitors c27_voltage

! Monitores do tipo : Transformer
Export monitors t1_power
Export monitors t1_voltage

! Monitores do tipo : Line

Export monitors _abcn_l01-sec_power
Export monitors _abcn_l01-sec_voltage
Export monitors _cn_l02-ramal_power
Export monitors _cn_l02-ramal_voltage
Export monitors _abcn_l03-sec_power
Export monitors _abcn_l03-sec_voltage
Export monitors _abcn_l04-sec_power
Export monitors _abcn_l04-sec_voltage
Export monitors _abcn_l05-sec_power
Export monitors _abcn_l05-sec_voltage
Export monitors _abcn_l06-sec_power
Export monitors _abcn_l06-sec_voltage
Export monitors _an_l07-ramal_power
Export monitors _an_l07-ramal_voltage
Export monitors _bcn_l08-ramal_power
Export monitors _bcn_l08-ramal_voltage
Export monitors _abcn_l09-sec_power
Export monitors _abcn_l09-sec_voltage
Export monitors _abcn_l10-sec_power
Export monitors _abcn_l10-sec_voltage
Export monitors _abcn_l11-ramal_power
Export monitors _abcn_l11-ramal_voltage
Export monitors _an_l12-ramal_power
Export monitors _an_l12-ramal_voltage
Export monitors _bcn_l13-ramal_power
Export monitors _bcn_l13-ramal_voltage
Export monitors _abcn_l14-ramal_power
Export monitors _abcn_l14-ramal_voltage
Export monitors _acn_l15-ramal_power
Export monitors _acn_l15-ramal_voltage
Export monitors _bn_l16-ramal_power
Export monitors _bn_l16-ramal_voltage
Export monitors _abcn_l17-sec_power
Export monitors _abcn_l17-sec_voltage
Export monitors _bcn_l18-ramal_power
Export monitors _bcn_l18-ramal_voltage
Export monitors _abcn_l19-sec_power
Export monitors _abcn_l19-sec_voltage
Export monitors _abcn_l20-sec_power
Export monitors _abcn_l20-sec_voltage
Export monitors _abcn_l21-sec_power
Export monitors _abcn_l21-sec_voltage
Export monitors _bcn_l22-ramal_power
Export monitors _bcn_l22-ramal_voltage
Export monitors _abcn_l23-sec_power
Export monitors _abcn_l23-sec_voltage
Export monitors _bn_l24-ramal_power
Export monitors _bn_l24-ramal_voltage
Export monitors _abn_l25-ramal_power
Export monitors _abn_l25-ramal_voltage
Export monitors _cn_l26-ramal_power
Export monitors _cn_l26-ramal_voltage
Export monitors _abcn_l27-sec_power
Export monitors _abcn_l27-sec_voltage
Export monitors _an_l28-ramal_power
Export monitors _an_l28-ramal_voltage
Export monitors _cn_l29-ramal_power
Export monitors _cn_l29-ramal_voltage
Export monitors _an_l30-ramal_power
Export monitors _an_l30-ramal_voltage
Export monitors _cn_l31-ramal_power
Export monitors _cn_l31-ramal_voltage
Export monitors _cn_l32-ramal_power
Export monitors _cn_l32-ramal_voltage
Export monitors _an_l33-ramal_power
Export monitors _an_l33-ramal_voltage
Export monitors _acn_l34-ramal_power
Export monitors _acn_l34-ramal_voltage
Export monitors _an_l35-ramal_power
Export monitors _an_l35-ramal_voltage
Export monitors _bn_l36-ramal_power
Export monitors _bn_l36-ramal_voltage
Export monitors _cn_l37-ramal_power
Export monitors _cn_l37-ramal_voltage
Export monitors _bn_l38-ramal_power
Export monitors _bn_l38-ramal_voltage
Export monitors _an_l39-ramal_power
Export monitors _an_l39-ramal_voltage

! Monitores do tipo : Load

Export monitors c01_power
Export monitors c01_voltage
Export monitors c02_power
Export monitors c02_voltage
Export monitors c03_power
Export monitors c03_voltage
Export monitors c04_power
Export monitors c04_voltage
Export monitors c05_power
Export monitors c05_voltage
Export monitors c06_power
Export monitors c06_voltage
Export monitors c07_power
Export monitors c07_voltage
Export monitors c08_power
Export monitors c08_voltage
Export monitors c09_power
Export monitors c09_voltage
Export monitors c10_power
Export monitors c10_voltage
Export monitors c11_power
Export monitors c11_voltage
Export monitors c12_power
Export monitors c12_voltage
Export monitors c13_power
Export monitors c13_voltage
Export monitors c14_power
Export monitors c14_voltage
Export monitors c15_power
Export monitors c15_voltage
Export monitors c16_power
Export monitors c16_voltage
Export monitors c17_power
Export monitors c17_voltage
Export monitors c18_power
Export monitors c18_voltage
Export monitors c19_power
Export monitors c19_voltage
Export monitors c20_power
Export monitors c20_voltage
Export monitors c21_power
Export monitors c21_voltage
Export monitors c22_power
Export monitors c22_voltage
Export monitors c23_power
Export monitors c23_voltage
Export monitors c24_power
Export monitors c24_voltage
Export monitors c25_power
Export monitors c25_voltage
Export monitors c26_power
Export monitors c26_voltage
Export monitors c27_power
Export monitors c27_voltage

! Monitores do tipo : Transformer

Export monitors t1_power
Export monitors t1_voltage

! Monitores do tipo : Line

Export monitors _abcn_l01-sec_power
Export monitors _abcn_l01-sec_voltage
Export monitors _cn_l02-ramal_power
Export monitors _cn_l02-ramal_voltage
Export monitors _abcn_l03-sec_power
Export monitors _abcn_l03-sec_voltage
Export monitors _abcn_l04-sec_power
Export monitors _abcn_l04-sec_voltage
Export monitors _abcn_l05-sec_power
Export monitors _abcn_l05-sec_voltage
Export monitors _abcn_l06-sec_power
Export monitors _abcn_l06-sec_voltage
Export monitors _an_l07-ramal_power
Export monitors _an_l07-ramal_voltage
Export monitors _bcn_l08-ramal_power
Export monitors _bcn_l08-ramal_voltage
Export monitors _abcn_l09-sec_power
Export monitors _abcn_l09-sec_voltage
Export monitors _abcn_l10-sec_power
Export monitors _abcn_l10-sec_voltage
Export monitors _abcn_l11-ramal_power
Export monitors _abcn_l11-ramal_voltage
Export monitors _an_l12-ramal_power
Export monitors _an_l12-ramal_voltage
Export monitors _bcn_l13-ramal_power
Export monitors _bcn_l13-ramal_voltage
Export monitors _abcn_l14-ramal_power
Export monitors _abcn_l14-ramal_voltage
Export monitors _acn_l15-ramal_power
Export monitors _acn_l15-ramal_voltage
Export monitors _bn_l16-ramal_power
Export monitors _bn_l16-ramal_voltage
Export monitors _abcn_l17-sec_power
Export monitors _abcn_l17-sec_voltage
Export monitors _bcn_l18-ramal_power
Export monitors _bcn_l18-ramal_voltage
Export monitors _abcn_l19-sec_power
Export monitors _abcn_l19-sec_voltage
Export monitors _abcn_l20-sec_power
Export monitors _abcn_l20-sec_voltage
Export monitors _abcn_l21-sec_power
Export monitors _abcn_l21-sec_voltage
Export monitors _bcn_l22-ramal_power
Export monitors _bcn_l22-ramal_voltage
Export monitors _abcn_l23-sec_power
Export monitors _abcn_l23-sec_voltage
Export monitors _bn_l24-ramal_power
Export monitors _bn_l24-ramal_voltage
Export monitors _abn_l25-ramal_power
Export monitors _abn_l25-ramal_voltage
Export monitors _cn_l26-ramal_power
Export monitors _cn_l26-ramal_voltage
Export monitors _abcn_l27-sec_power
Export monitors _abcn_l27-sec_voltage
Export monitors _an_l28-ramal_power
Export monitors _an_l28-ramal_voltage
Export monitors _cn_l29-ramal_power
Export monitors _cn_l29-ramal_voltage
Export monitors _an_l30-ramal_power
Export monitors _an_l30-ramal_voltage
Export monitors _cn_l31-ramal_power
Export monitors _cn_l31-ramal_voltage
Export monitors _cn_l32-ramal_power
Export monitors _cn_l32-ramal_voltage
Export monitors _an_l33-ramal_power
Export monitors _an_l33-ramal_voltage
Export monitors _acn_l34-ramal_power
Export monitors _acn_l34-ramal_voltage
Export monitors _an_l35-ramal_power
Export monitors _an_l35-ramal_voltage
Export monitors _bn_l36-ramal_power
Export monitors _bn_l36-ramal_voltage
Export monitors _cn_l37-ramal_power
Export monitors _cn_l37-ramal_voltage
Export monitors _bn_l38-ramal_power
Export monitors _bn_l38-ramal_voltage
Export monitors _an_l39-ramal_power
Export monitors _an_l39-ramal_voltage

! Monitores do tipo : Load

Export monitors c01_power
Export monitors c01_voltage
Export monitors c02_power
Export monitors c02_voltage
Export monitors c03_power
Export monitors c03_voltage
Export monitors c04_power
Export monitors c04_voltage
Export monitors c05_power
Export monitors c05_voltage
Export monitors c06_power
Export monitors c06_voltage
Export monitors c07_power
Export monitors c07_voltage
Export monitors c08_power
Export monitors c08_voltage
Export monitors c09_power
Export monitors c09_voltage
Export monitors c10_power
Export monitors c10_voltage
Export monitors c11_power
Export monitors c11_voltage
Export monitors c12_power
Export monitors c12_voltage
Export monitors c13_power
Export monitors c13_voltage
Export monitors c14_power
Export monitors c14_voltage
Export monitors c15_power
Export monitors c15_voltage
Export monitors c16_power
Export monitors c16_voltage
Export monitors c17_power
Export monitors c17_voltage
Export monitors c18_power
Export monitors c18_voltage
Export monitors c19_power
Export monitors c19_voltage
Export monitors c20_power
Export monitors c20_voltage
Export monitors c21_power
Export monitors c21_voltage
Export monitors c22_power
Export monitors c22_voltage
Export monitors c23_power
Export monitors c23_voltage
Export monitors c24_power
Export monitors c24_voltage
Export monitors c25_power
Export monitors c25_voltage
Export monitors c26_power
Export monitors c26_voltage
Export monitors c27_power
Export monitors c27_voltage

! Monitores do tipo : Transformer

Export monitors t1_power
Export monitors t1_voltage
